FINISH
/CLEAR
/TITLE, Beam and some air
/COM ---- Parameters
l=200e-6
a=150e-6
w=50e-6
t=20E-6
l_pad=40e-6
t_pad=0.1e-6
gap=0.4e-6
w_air=50e-6
V=1

!Silicon
CTE=2.6e-6	!coefficient of thermal expansion for Silicon (1/K)
Y=169e9		!Young Modulus of Si (We consider istotropic properties)
nu=0.36		!Poisson coefficient
rho=9E-4	!Resistivity (Ohm*m) of Boron-doped silicon for 1E19 at/cm^3
kth=149		!thermal conductivity (W/m/K)

!Air
Y_air=1e-3	!to avoid mesh collapse problems
nu_air=0.1
kth_air=0.024	!Thermal Conductivity
rho_air=1E9		!very large electrical resistance for air

/COM --- Geometry and elements
/PREP7
ET,1,SOLID226,1001	!3-D 20-Node Coupled-Field Solid. Switch on DOF disp and electro static


!Material Properties for the beam
MP,EX,1,Y		!Apply Young's modulus
MP,PRXY,1,nu	!Apply Poisson ratio
MP,ALPX,1,CTE		!Apply Coefficient of Thermal Expansion
MP,RSVX,1,rho		!Apply resistivity
MP,KXX,1,kth

!Material Properties for the air
MP,EX,2,Y_air
MP,PRXY,2,nu_air
MP,KXX,2,kth_air
MP,RSVX,2,rho_air


!The geometry is split into rectangles so that Mapped meshing can be used.
K, 01, 0, t + gap + 2*t_pad			!Define keypoints
K, 02, 0, 0
K, 03, l, 0
K, 04, l, t + gap + 2*t_pad

K, 05, 0, 2*t_pad + gap
K, 06, l, 2*t_pad + gap

K, 07, a - l_pad / 2, 2*t_pad + gap
K, 08, a - l_pad / 2, t_pad + gap
K, 09, a + l_pad / 2, t_pad + gap
K, 10, a + l_pad / 2, 2*t_pad + gap

K, 11, a - l_pad / 2, t_pad
K, 12, a - l_pad / 2, 0
K, 13, a + l_pad / 2, 0
K, 14, a + l_pad / 2, t_pad


!surfaces
A,01,05,06,04 ! beam

! gold pads
A,07,08,09,10
A,11,12,13,14

! air inside
A,05,02,12,07
A,08,11,14,09
A,10,13,03,06

A,01,02,03,04 ! air on the side


!Creates the volume by extrusion in the thicknedd direction
*DO,k,1,6,1
VOFFST,k,w !Creates the volume by extrusion in the thicknedd direction
*ENDDO

VOFFST,7,-w_air

NUMMRG,KP,1e-9,1e-9	!merge the coincident keypoints that were created with the VOFFST command

ESIZE,t/2

VSEL,S,LOC,Z,w/2
VSEL,R,LOC,Y, 2*t_pad + gap + t/2
VATT,1	!Material 1 (silicon)
VMESH,ALL

VSEL,S,LOC,Z,w/2
VSEL,R,LOC,Y, t_pad + gap/2
VATT,2	!Material 2 (air)
VMESH,ALL

VSEL,S,LOC,Z,-w_air/2
VATT,2	!Material 2 (air)
VMESH,ALL

VSEL,S,LOC,Z,w/2
VSEL,R,LOC,Y, t_pad/2
VSEL,R,LOC,X, a
VATT,1	!Material 3 (gold)
VMESH,ALL

VSEL,S,LOC,Z,w/2
VSEL,R,LOC,Y, gap + t_pad + t_pad/2
VSEL,R,LOC,X, a
VATT,1	!Material 3 (gold)
VMESH,ALL


ALLSEL,ALL

/COM --- Loads and Boundary conditions

ASEL,S,LOC,X,0		!Select the areas a X=0
DA,ALL,UX,0			!Lock all displacement on those areas (anchor)
DA,ALL,UY,0
DA,ALL,UZ,0

ASEL,S,LOC,Y,0		!Select the areas a Y=0
DA,ALL,UX,0			!Lock all displacement on those areas (anchor)
DA,ALL,UY,0
DA,ALL,UZ,0

! set ground pad to 0V
ASEL,S,LOC,Y,t_pad
DA,ALL,VOLT,0

! set acutator pad to V
ASEL,S,LOC,Y, gap + t_pad
DA,ALL,VOLT,V

ALLSEL,ALL			!Reselects all
FINISH

/SOLU
ANTYPE,STATIC
CNVTOL,f,1,1.e-4     ! Define convergence tolerances
!nlgeom,on            ! Large deflection analysis
NSUBST,5,20,2
SOLVE
FINISH

/POST1
/CONTOUR,ALL,128
PLNSOL, U,Y, 2,1.0	!plot the displacement along y
